# Вариант 30
# Двигатель  2ПН200L:
ndn := 800  # Геометрические параметры вала
l1 := 0.42
l2 := 0.12
l3 := 0.12
ω_d := ndn*2*π/60
γ1 := 10
γ2 := 40
ω_I := ω_d = 83.7758
ω_III := 15
z1 := 24
z2' := 28
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M_пmax := 1225
E_пр := 2*10^11
σ_ив := 4*10^7
σ_k3 := 10^9
σ_смIII := 1.8*10^8
σ_из := 2*10^8
α := 20*deg
τ_cpIII := 1.2*10^8
ψ := 0.3
η_3 := 0.97
η_II := 0.99
# 1. Определение мощности на валах редуктора
N_III := M_пmax*ω_III
N_II := N_III/(η_3*η_II)
N_I := N_II/(η_3*η_II)
# 2. Кинематический расчет передаточного механизма(редуктора)
# a) Передаточное число редуктора
u_I_III := |ω_I/ω_III| = 5.58505
# в) Разбить общее передаточное число на частные передаточные числа отдельных передач
u_1_2 := sqrt(u_I_III) = 2.36327
u_2'_3 := sqrt(u_I_III) = 2.36327
# г) Определить недостающие числа зубьев и округлить их до ближайших целых чисел
z2 := z1*u_1_2
z2 = 56.7185
z3 := z2'*u_2'_3
z3 = 66.1716
z2 := 57
z3 := 66
# д) Определить уточненные передаточные числа
u12y := z2/z1 = 2.375
u2'3y := z3/z2' = 2.35714
# д) Определить уточненные угловые скорости
ω_I := ω_d = 83.7758
ω_IIy := ω_I/u12y = 35.274
ω_IIIy := ω_I/(u12y*u2'3y) = 14.9647
# ж) Оценить ошибку по ωIII
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Δω_III := (ω_IIIy - ω_III)/ω_III*100 = -0.235087
# 3. Определение геометрических размеров редуктора
# а) Определить межосевые расстояния из условия прочности зубьев
a12р := u12y^3*sqrt((0.418/(u12y*σ_k3))^2*2*N_II*E_пр/(ω_IIy*ψ*sin(2*α))) = 0.07909
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a2'3р := u2'3y^3*sqrt((0.418/(u2'3y*σ_k3))^2*2*N_III*E_пр/(ω_IIIy*ψ*sin(2*α))) = 0.11721
# б) Найти расчетные модули зубьев
m1р := 2*a12р/(z1 + z2) = 0.00195284
m2р := 2*a2'3р/(z2' + z3) = 0.00249382
m1 := 2/1000 = 0.002
m2 := 2.5/1000 = 0.0025
# г) Уточнить межосевые расстояния
a12 := m1*(z1 + z2)/2 = 0.081
a2'3 := m2*(z2' + z3)/2 = 0.1175
# д) Определить толщины зубчатых венцов
b1 := ψ*a12 = 0.0243
b2 := ψ*a2'3 = 0.03525
# e) Определить радиусы делительных окружностей
r1 := m1*z1/2 = 0.024
r2 := m1*z2/2 = 0.057
r2' := m2*z2'/2 = 0.035
r3 := m2*z3/2 = 0.0825
# 4. Расчет усилий, действующих на зубья колес промежуточного редуктора
# б) Определить окружные силы, действующие на промежуточный вал
Fτ12 := N_II/(r2*ω_IIy)
Fτ32' := N_II/(r2'*ω_IIy)
# б) Определить радиальные силы, действующие на промежуточный вал
Fr12 := Fτ12*tan(α)
Fr32' := Fτ32'*tan(α)
# в) Определить нормальные силы, действующие на промежуточный вал
Fn12 := sqrt(Fτ12^2 + Fr12^2)
Fn32' := sqrt(Fτ32'^2 + Fr32'^2)
# 5. Проверка зубьев на изгибную прочность по формулам
